*Heading
** Job name: vonMises_planar_tension name: Model-1
** Generated by: Abaqus/CAE 2022
*Preprint, echo=NO, model=NO, history=NO, contact=NO
**
** PARTS
**
*Part, name=Part-1
*Node
      1,           1.,           1.,           1.
      2,           1.,           0.,           1.
      3,           1.,           1.,           0.
      4,           1.,           0.,           0.
      5,           0.,           1.,           1.
      6,           0.,           0.,           1.
      7,           0.,           1.,           0.
      8,           0.,           0.,           0.
*Element, type=C3D8
1, 5, 6, 8, 7, 1, 2, 4, 3
*Nset, nset=Set-1, generate
 1,  8,  1
*Elset, elset=Set-1
 1,
** Section: Section-1
*Solid Section, elset=Set-1, material=Material-1
,
*End Part
**
**
** ASSEMBLY
**
*Assembly, name=Assembly
**
*Instance, name=Part-1-1, part=Part-1
*End Instance
**
*Nset, nset=Set-1, instance=Part-1-1, generate
 5,  8,  1
*Elset, elset=Set-1, instance=Part-1-1
 1,
*Nset, nset=Set-2, instance=Part-1-1, generate
 2,  8,  2
*Elset, elset=Set-2, instance=Part-1-1
 1,
*Nset, nset=Set-3, instance=Part-1-1
 3, 4, 7, 8
*Elset, elset=Set-3, instance=Part-1-1
 1,
*Nset, nset=Set-4, internal, instance=Part-1-1
 1, 2, 5, 6
*Elset, elset=Set-4, internal, instance=Part-1-1
 1,
*Nset, nset=Set-5, internal, instance=Part-1-1, generate
 1,  7,  2
*Elset, elset=Set-5, internal, instance=Part-1-1
 1,
*End Assembly
**
** MATERIALS
**
*Material, name=Material-1
*Depvar
     13,
1, EE11, EE11
2, EE22, EE22
3, EE33, EE33
4, EE12, EE12
5, EE13, EE13
6, EE23, EE23
7, EP11, EP11
8, EP22, EP22
9, EP33, EP33
10, EP12, EP12
11, EP13, EP13
12, EP23, EP23
13, PEEQ, PEEQ
*User Material, constants=41806
200000, 0.3, -0.07591417, -0.44323587, -0.025234679, -0.09416211, 0.36750558, -0.47965482,
-0.097244024, -0.24411848, -0.2851543, 0.018398762, -0.17020409, -0.34478706, -0.24364328, 0.40715373,
-0.35694885, -0.0122124255, -0.3446011, 0.018567216, -0.4710015, -0.025617512, -0.26338255, -0.44710127,
-0.40031916, -0.24607974, -0.19215637, -0.49512917, -0.23703933, -0.090078756, 0.053843733, 0.10856127,
-0.12172045, -0.060848385, 0.11633041, 0.040010422, -0.15623698, -0.42617565, -0.44734412, -0.28063625,
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0.27408302, 0.019635832, -0.20081708, -0.12312063, -0.08287486, -0.062316358,
** BOUNDARY CONDITIONS
**
** Name: BC-1 Type: Displacement/Rotation
*Boundary
Set-1, 1, 1
** Name: BC-2 Type: Displacement/Rotation
*Boundary
Set-2, 2, 2
** Name: BC-3 Type: Displacement/Rotation
*Boundary
Set-3, 3, 3
** ----------------------------------------------------------------
**
** STEP: Step-1
**
*Step, name=Step-1, nlgeom=NO
*Static, direct
0.025, 1.,
**
** BOUNDARY CONDITIONS
**
** Name: BC-4 Type: Displacement/Rotation
*Boundary
Set-4, 3, 3
** Name: BC-5 Type: Displacement/Rotation
*Boundary
Set-5, 2, 2, 0.008
**
** OUTPUT REQUESTS
**
*Restart, write, frequency=0
**
** FIELD OUTPUT: F-Output-1
**
*Output, field, variable=PRESELECT
**
** HISTORY OUTPUT: H-Output-1
**
*Output, history, variable=PRESELECT
*End Step
